<?xml version="1.0"?>
<?xml-stylesheet type="text/xsl" href="http://jsbsim.sourceforge.net/JSBSim.xsl"?>
<fdm_config name="unnamed" version="2.0" release="ALPHA"
   xmlns:xsi="http://www.w3.org/2001/XMLSchema-instance"
   xsi:noNamespaceSchemaLocation="http://jsbsim.sourceforge.net/JSBSim.xsd">

 <fileheader>
  <author>Daniel Overbeck</author>
  <filecreationdate>2020-01-05</filecreationdate>
  <version>V0.1</version>
  <description>MiG-25RB</description>
  <reference refID="" author="н.н. котов" title="практическая аэродинамика самолета миг-25рб" date="1978"/>
 </fileheader>

 <metrics>
   <wingarea  unit="M2"> 61.4 </wingarea> <!-- table 1.2 -->
   <wingspan  unit="M" > 13.4 </wingspan> <!-- table 1.2 -->
   <wing_incidence>       0.0 </wing_incidence>
   <chord     unit="M" >  5.0 </chord> <!-- table 1.2 -->
   <htailarea unit="M2">  4.0 </htailarea>
   <htailarm  unit="M" > 10.0 </htailarm>
   <vtailarea unit="M2">  7.0 </vtailarea>
   <vtailarm  unit="M" >  9.0 </vtailarm>
   <location name="AERORP" unit="M">
     <x> 5.0 </x>
     <y> 0.0 </y>
     <z> 0.5 </z>
   </location>
   <location name="EYEPOINT" unit="M">
     <x> -3.0 </x>
     <y>  0.0 </y>
     <z>  1.2 </z>
   </location>
   <location name="VRP" unit="M">
     <x>0</x>
     <y>0</y>
     <z>0</z>
   </location>
 </metrics>

 <mass_balance>
   <ixx unit="SLUG*FT2">  70000 </ixx>
   <iyy unit="SLUG*FT2"> 240000 </iyy>
   <izz unit="SLUG*FT2"> 300000 </izz>
   <emptywt unit="KG" >   20000 </emptywt>
   <location name="CG" unit="M">
     <x> 3.5 </x>
     <y> 0.0 </y>
     <z> 0.5 </z>
   </location>
 </mass_balance>

 <ground_reactions>
  <contact type="BOGEY" name="NOSE">
   <location unit="M">
     <x> -1.27 </x>
     <y>  0.00 </y>
     <z> -1.90 </z>
   </location>
   <static_friction>  0.80 </static_friction>
   <dynamic_friction> 0.50 </dynamic_friction>
   <rolling_friction> 0.02 </rolling_friction>
   <spring_coeff unit="LBS/FT">      24290.28 </spring_coeff>
   <damping_coeff unit="LBS/FT/SEC"> 12145.14 </damping_coeff>
   <max_steer unit="DEG"> 5.00 </max_steer>
   <brake_group>NONE</brake_group>
   <retractable>1</retractable>
  </contact>

  <contact type="BOGEY" name="LEFT_MAIN">
   <location unit="M">
     <x>  3.6 </x>
     <y> -1.9 </y>
     <z> -1.9 </z>
   </location>
   <static_friction>  0.80 </static_friction>
   <dynamic_friction> 0.50 </dynamic_friction>
   <rolling_friction> 0.02 </rolling_friction>
   <spring_coeff unit="LBS/FT">      80967.60 </spring_coeff>
   <damping_coeff unit="LBS/FT/SEC"> 40483.80 </damping_coeff>
   <max_steer unit="DEG">0</max_steer>
   <brake_group>LEFT</brake_group>
   <retractable>1</retractable>
  </contact>

  <contact type="BOGEY" name="RIGHT_MAIN">
   <location unit="M">
     <x>  3.6 </x>
     <y>  1.9 </y>
     <z> -1.9 </z>
   </location>
   <static_friction>  0.80 </static_friction>
   <dynamic_friction> 0.50 </dynamic_friction>
   <rolling_friction> 0.02 </rolling_friction>
   <spring_coeff unit="LBS/FT">      80967.60 </spring_coeff>
   <damping_coeff unit="LBS/FT/SEC"> 40483.80 </damping_coeff>
   <max_steer unit="DEG">0</max_steer>
   <brake_group>RIGHT</brake_group>
   <retractable>1</retractable>
  </contact>

  <contact type="STRUCTURE" name="LEFT_WING">
    <location unit="M">
     <x>  7.0 </x>
     <y> -6.8 </y>
     <z>  0.4 </z>
    </location>
    <static_friction>  1.00 </static_friction>
    <dynamic_friction> 1.00 </dynamic_friction>
    <spring_coeff unit="LBS/FT">      80967.60 </spring_coeff>
    <damping_coeff unit="LBS/FT/SEC"> 80967.60 </damping_coeff>
  </contact>

  <contact type="STRUCTURE" name="RIGHT_WING">
    <location unit="M">
     <x>  7.0 </x>
     <y>  6.8 </y>
     <z>  0.4 </z>
    </location>
    <static_friction>  1.00 </static_friction>
    <dynamic_friction> 1.00 </dynamic_friction>
    <spring_coeff unit="LBS/FT">      80967.60 </spring_coeff>
    <damping_coeff unit="LBS/FT/SEC"> 80967.60 </damping_coeff>
  </contact>
 </ground_reactions>

 <propulsion>
   <engine file="Tumansky-R15BD-300">
    <location unit="M">
      <x> 6.0 </x>
      <y>-0.8 </y>
      <z> 0.5 </z>
    </location>
    <orient unit="DEG">
      <pitch> 0.0 </pitch>
      <roll>  0.0 </roll>
      <yaw>   0.0 </yaw>
    </orient>
    <feed>0</feed>
    <thruster file="direct">
     <location unit="M">
       <x> 7.0 </x>
       <y>-0.8 </y>
       <z> 0.5 </z>
     </location>
     <orient unit="DEG">
       <pitch> 0.0 </pitch>
       <roll>  0.0 </roll>
       <yaw>   0.0 </yaw>
     </orient>
    </thruster>
  </engine>

   <engine file="Tumansky-R15BD-300">
    <location unit="M">
      <x> 6.0 </x>
      <y> 0.8 </y>
      <z> 0.5 </z>
    </location>
    <orient unit="DEG">
      <pitch> 0.0 </pitch>
      <roll>  0.0 </roll>
      <yaw>   0.0 </yaw>
    </orient>
    <feed>0</feed>
    <thruster file="direct">
     <location unit="M">
       <x> 7.0 </x>
       <y> 0.8 </y>
       <z> 0.5 </z>
     </location>
     <orient unit="DEG">
       <pitch> 0.0 </pitch>
       <roll>  0.0 </roll>
       <yaw>   0.0 </yaw>
     </orient>
    </thruster>
  </engine>

  <tank type="FUEL" number="0">
     <location unit="M">
       <x>  2.0 </x>
       <y>  0.0 </y>
       <z>  0.0 </z>
     </location>
     <capacity unit="KG"> 8000 </capacity>
     <contents unit="KG"> 5000 </contents>
  </tank>

  <tank type="FUEL" number="1">
     <location unit="M">
       <x>  5.0 </x>
       <y> -3.5 </y>
       <z>  0.7 </z>
     </location>
     <capacity unit="KG"> 3000 </capacity>
     <contents unit="KG"> 1000 </contents>
  </tank>

  <tank type="FUEL" number="2">
     <location unit="M">
       <x>  5.0 </x>
       <y>  3.5 </y>
       <z>  0.7 </z>
     </location>
     <capacity unit="KG"> 3000 </capacity>
     <contents unit="KG"> 1000 </contents>
  </tank>
 </propulsion>

 <flight_control name="FCS: unnamed">
  <channel name="Pitch">
   <summer name="Pitch Trim Sum">
      <input>fcs/elevator-cmd-norm</input>
      <input>fcs/pitch-trim-cmd-norm</input>
      <clipto>
        <min> -1 </min>
        <max>  1 </max>
      </clipto>
   </summer>

   <aerosurface_scale name="Elevator Control">
      <input>fcs/pitch-trim-sum</input>
      <range>
        <min> -0.35 </min>
        <max>  0.35 </max>
      </range>
      <output>fcs/elevator-pos-rad</output>
   </aerosurface_scale>

   <aerosurface_scale name="elevator normalization">
      <input>fcs/elevator-pos-rad</input>
      <domain>
        <min> -0.35 </min>
        <max>  0.35 </max>
      </domain>
      <range>
        <min> -1 </min>
        <max>  1 </max>
      </range>
      <output>fcs/elevator-pos-norm</output>
   </aerosurface_scale>
  </channel>

  <channel name="Roll">
   <summer name="Roll Trim Sum">
      <input>fcs/aileron-cmd-norm</input>
      <input>fcs/roll-trim-cmd-norm</input>
      <clipto>
        <min> -1 </min>
        <max>  1 </max>
      </clipto>
   </summer>

   <aerosurface_scale name="Left Aileron Control">
      <input>fcs/roll-trim-sum</input>
      <range>
        <min> -0.2 </min>
        <max>  0.2 </max>
      </range>
      <output>fcs/left-aileron-pos-rad</output>
   </aerosurface_scale>

   <aerosurface_scale name="Right Aileron Control">
      <input>fcs/roll-trim-sum</input>
      <range>
        <min> -0.2 </min>
        <max>  0.2 </max>
      </range>
      <output>fcs/right-aileron-pos-rad</output>
   </aerosurface_scale>

   <aerosurface_scale name="left aileron normalization">
      <input>fcs/left-aileron-pos-rad</input>
      <domain>
        <min> -0.2 </min>
        <max>  0.2 </max>
      </domain>
      <range>
        <min> -1 </min>
        <max>  1 </max>
      </range>
      <output>fcs/left-aileron-pos-norm</output>
   </aerosurface_scale>

   <aerosurface_scale name="right aileron normalization">
      <input>fcs/right-aileron-pos-rad</input>
      <domain>
        <min> -0.2 </min>
        <max>  0.2 </max>
      </domain>
      <range>
        <min> -1 </min>
        <max>  1 </max>
      </range>
      <output>fcs/right-aileron-pos-norm</output>
   </aerosurface_scale>
  </channel>

  <channel name="Yaw">
   <summer name="Rudder Command Sum">
      <input>fcs/rudder-cmd-norm</input>
      <input>fcs/yaw-trim-cmd-norm</input>
      <clipto>
        <min> -1 </min>
        <max>  1 </max>
      </clipto>
   </summer>

   <aerosurface_scale name="Rudder Control">
      <input>fcs/rudder-command-sum</input>
      <range>
        <min> -0.35 </min>
        <max>  0.35 </max>
      </range>
      <output>fcs/rudder-pos-rad</output>
   </aerosurface_scale>

   <aerosurface_scale name="rudder normalization">
      <input>fcs/rudder-pos-rad</input>
      <domain>
        <min> -0.35 </min>
        <max>  0.35 </max>
      </domain>
      <range>
        <min> -1 </min>
        <max>  1 </max>
      </range>
      <output>fcs/rudder-pos-norm</output>
   </aerosurface_scale>
  </channel>

  <channel name="Flaps">
   <kinematic name="Flaps Control">
     <input>fcs/flap-cmd-norm</input>
     <traverse>
       <setting>
          <position>  0 </position>
          <time>      0 </time>
       </setting>
       <setting>
          <position> 25 </position>
          <time>      5 </time>
       </setting>
     </traverse>
     <output>fcs/flap-pos-deg</output>
   </kinematic>

   <aerosurface_scale name="flap normalization">
      <input>fcs/flap-pos-deg</input>
      <domain>
        <min>  0 </min>
        <max> 25 </max>
      </domain>
      <range>
        <min> 0 </min>
        <max> 1 </max>
      </range>
      <output>fcs/flap-pos-norm</output>
   </aerosurface_scale>
  </channel>

  <channel name="Landing Gear">
   <kinematic name="Gear Control">
     <input>gear/gear-cmd-norm</input>
     <traverse>
       <setting>
          <position> 0 </position>
          <time>     0 </time>
       </setting>
       <setting>
          <position> 1 </position>
          <time>     5 </time>
       </setting>
     </traverse>
     <output>gear/gear-pos-norm</output>
   </kinematic>
  </channel>

  <channel name="Speedbrake">
   <kinematic name="Speedbrake Control">
     <input>fcs/speedbrake-cmd-norm</input>
     <traverse>
       <setting>
          <position> 0 </position>
          <time>     0 </time>
       </setting>
       <setting>
          <position> 1 </position>
          <time>     1 </time>
       </setting>
     </traverse>
     <output>fcs/speedbrake-pos-norm</output>
   </kinematic>
  </channel>
 </flight_control>

 <aerodynamics>
  <axis name="LIFT">
    <function name="aero/force/Lift_alpha">
      <description>Lift due to alpha</description>
      <product>
          <property>aero/qbar-psf</property>
          <property>metrics/Sw-sqft</property>
          <table>
            <independentVar lookup="row">aero/alpha-deg</independentVar>
            <independentVar lookup="column">velocities/mach</independentVar>
            <tableData> <!-- figure 2.6 -->
                   0.25  0.50  0.75  1.00  1.25  1.50  1.75  2.00  2.25  2.50
               -2 -0.12 -0.13 -0.14 -0.16 -0.13 -0.10 -0.09 -0.08 -0.07 -0.07
                0  0.00  0.00  0.00  0.00  0.00  0.00  0.00  0.00  0.00  0.00
                2  0.12  0.13  0.14  0.16  0.13  0.10  0.09  0.08  0.07  0.07
                4  0.24  0.25  0.27  0.30  0.25  0.20  0.17  0.16  0.15  0.15
                6  0.36  0.37  0.40  0.45  0.35  0.30  0.26  0.24  0.22  0.21
                8  0.48  0.49  0.54  0.60  0.47  0.40  0.35  0.32  0.30  0.29
               10  0.60  0.61  0.66  0.73  0.60  0.50  0.44  0.40  0.37  0.35
               12  0.72  0.73  0.78  0.84  0.68  0.58  0.53  0.49  0.45  0.43
               14  0.84  0.85  0.90  0.95  0.00  0.00  0.00  0.00  0.00  0.00
               16  0.96  0.97  1.03  0.00  0.00  0.00  0.00  0.00  0.00  0.00
               18  1.07  1.08  0.00  0.00  0.00  0.00  0.00  0.00  0.00  0.00
            </tableData>
          </table>
      </product>
    </function>

    <function name="aero/force/Lift_flap">
       <description>Delta Lift due to flaps</description>
       <product>
           <property>aero/qbar-psf</property>
           <property>metrics/Sw-sqft</property>
           <property>fcs/flap-pos-deg</property>
           <value>0.008</value> <!-- figure 8.10, 0.2/25° -->
       </product>
    </function>

    <function name="aero/force/Lift_speedbrake">
       <description>Delta Lift due to speedbrake</description>
       <product>
           <property>aero/qbar-psf</property>
           <property>metrics/Sw-sqft</property>
           <property>fcs/speedbrake-pos-norm</property>
           <value>0</value>
       </product>
    </function>

    <function name="aero/force/Lift_elevator">
       <description>Lift due to Elevator Deflection</description>
       <product>
           <property>aero/qbar-psf</property>
           <property>metrics/Sw-sqft</property>
           <property>fcs/elevator-pos-rad</property>
           <value>0.2</value>
       </product>
    </function>
  </axis>

  <axis name="DRAG">
    <function name="aero/force/Drag_basic">
       <description>Drag at zero lift</description>
       <product>
          <property>aero/qbar-psf</property>
          <property>metrics/Sw-sqft</property>
          <table>
            <independentVar lookup="row">aero/alpha-deg</independentVar>
            <tableData> <!-- figure 2.12, offset handled in Drag_mach -->
              0.0   0.001
              1.0   0.000
              2.0   0.001
              3.0   0.004
              4.0   0.008
              5.0   0.014
              6.0   0.021
              7.0   0.030
              8.0   0.040
            </tableData>
          </table>
       </product>
    </function>

    <function name="aero/force/Drag_mach">
       <description>Drag due to mach</description>
        <product>
          <property>aero/qbar-psf</property>
          <property>metrics/Sw-sqft</property>
          <table>
            <independentVar lookup="row">velocities/mach</independentVar>
            <tableData> <!-- figure 2.7 -->
              0.2   0.0255
              0.8   0.0255
              0.9   0.0275
              1.0   0.0350
              1.1   0.0395
              1.2   0.0410
              1.3   0.0400
              2.4   0.0300
            </tableData>
          </table>
        </product>
    </function>

    <function name="aero/force/Drag_flap">
       <description>Drag due to flaps</description>
         <product>
           <property>aero/qbar-psf</property>
           <property>metrics/Sw-sqft</property>
           <property>fcs/flap-pos-deg</property>
           <value> 0.0008 </value> <!-- figure 8.2 -->
         </product>
    </function>

    <function name="aero/force/Drag_gear">
       <description>Drag due to gear</description>
         <product>
           <property>aero/qbar-psf</property>
           <property>metrics/Sw-sqft</property>
           <property>gear/gear-pos-norm</property>
           <value>0.016</value> <!-- figure 8.2, 0.0016 in figure 2.10 seems wrong -->
         </product>
    </function>

    <function name="aero/force/Drag_speedbrake">
       <description>Drag due to speedbrakes</description>
         <product>
           <property>aero/qbar-psf</property>
           <property>metrics/Sw-sqft</property>
           <property>fcs/speedbrake-pos-norm</property>
           <value>0.021</value> <!-- figure 2.10 -->
         </product>
    </function>

    <function name="aero/force/Drag_beta">
       <description>Drag due to sideslip</description>
       <product>
          <property>aero/qbar-psf</property>
          <property>metrics/Sw-sqft</property>
          <table>
            <independentVar lookup="row">aero/beta-rad</independentVar>
            <tableData>
              -1.57    1.230
              -0.26    0.050
               0.00    0.000
               0.26    0.050
               1.57    1.230
            </tableData>
          </table>
       </product>
    </function>

    <function name="aero/force/Drag_elevator">
       <description>Drag due to Elevator Deflection</description>
       <product>
           <property>aero/qbar-psf</property>
           <property>metrics/Sw-sqft</property>
           <abs><property>fcs/elevator-pos-norm</property></abs>
           <value>0.04</value>
       </product>
    </function>
  </axis>

  <axis name="SIDE">
    <function name="aero/force/Side_beta">
       <description>Side force due to beta</description>
       <product>
           <property>aero/qbar-psf</property>
           <property>metrics/Sw-sqft</property>
           <property>aero/beta-rad</property>
           <value>-1</value>
       </product>
    </function>
  </axis>

  <axis name="ROLL">
    <function name="aero/moment/Roll_beta">
       <description>Roll moment due to beta</description>
       <product>
           <property>aero/qbar-psf</property>
           <property>metrics/Sw-sqft</property>
           <property>metrics/bw-ft</property>
           <property>aero/beta-rad</property>
           <value>-0.1</value>
       </product>
    </function>

    <function name="aero/moment/Roll_damp">
       <description>Roll moment due to roll rate</description>
       <product>
           <property>aero/qbar-psf</property>
           <property>metrics/Sw-sqft</property>
           <property>metrics/bw-ft</property>
           <property>aero/bi2vel</property>
           <property>velocities/p-aero-rad_sec</property>
           <value>-0.4</value>
       </product>
    </function>

    <function name="aero/moment/Roll_yaw">
       <description>Roll moment due to yaw rate</description>
       <product>
           <property>aero/qbar-psf</property>
           <property>metrics/Sw-sqft</property>
           <property>metrics/bw-ft</property>
           <property>aero/bi2vel</property>
           <property>velocities/r-aero-rad_sec</property>
           <value>0.15</value>
       </product>
    </function>

    <function name="aero/moment/Roll_aileron">
       <description>Roll moment due to aileron</description>
       <product>
          <property>aero/qbar-psf</property>
          <property>metrics/Sw-sqft</property>
          <property>metrics/bw-ft</property>
          <property>fcs/left-aileron-pos-rad</property>
          <value>0.12</value>
       </product>
    </function>

    <function name="aero/moment/Roll_rudder">
       <description>Roll moment due to rudder</description>
       <product>
           <property>aero/qbar-psf</property>
           <property>metrics/Sw-sqft</property>
           <property>metrics/bw-ft</property>
           <property>fcs/rudder-pos-rad</property>
           <value>0.01</value>
       </product>
    </function>
  </axis>

  <axis name="PITCH">
    <function name="aero/moment/Pitch_alpha">
       <description>Pitch moment due to alpha</description>
       <product>
           <property>aero/qbar-psf</property>
           <property>metrics/Sw-sqft</property>
           <property>metrics/cbarw-ft</property>
           <property>aero/alpha-rad</property>
           <value>-0.3</value>
       </product>
    </function>

    <function name="aero/moment/Pitch_elevator">
       <description>Pitch moment due to elevator</description>
       <product>
          <property>aero/qbar-psf</property>
          <property>metrics/Sw-sqft</property>
          <property>metrics/cbarw-ft</property>
          <property>fcs/elevator-pos-rad</property>
          <table>
            <independentVar lookup="row">velocities/mach</independentVar>
            <tableData>
              0.0     -0.800
              2.0     -0.200
            </tableData>
          </table>
       </product>
    </function>

    <function name="aero/moment/Pitch_damp">
       <description>Pitch moment due to pitch rate</description>
       <product>
           <property>aero/qbar-psf</property>
           <property>metrics/Sw-sqft</property>
           <property>metrics/cbarw-ft</property>
           <property>aero/ci2vel</property>
           <property>velocities/q-aero-rad_sec</property>
           <value>-18</value>
       </product>
    </function>

    <function name="aero/moment/Pitch_alphadot">
       <description>Pitch moment due to alpha rate</description>
       <product>
           <property>aero/qbar-psf</property>
           <property>metrics/Sw-sqft</property>
           <property>metrics/cbarw-ft</property>
           <property>aero/ci2vel</property>
           <property>aero/alphadot-rad_sec</property>
           <value>-9</value>
       </product>
    </function>
  </axis>

  <axis name="YAW">
    <function name="aero/moment/Yaw_beta">
       <description>Yaw moment due to beta</description>
       <product>
           <property>aero/qbar-psf</property>
           <property>metrics/Sw-sqft</property>
           <property>metrics/bw-ft</property>
           <property>aero/beta-rad</property>
           <value>0.09</value>
       </product>
    </function>

    <function name="aero/moment/Yaw_damp">
       <description>Yaw moment due to yaw rate</description>
       <product>
           <property>aero/qbar-psf</property>
           <property>metrics/Sw-sqft</property>
           <property>metrics/bw-ft</property>
           <property>aero/bi2vel</property>
           <property>velocities/r-aero-rad_sec</property>
           <value>-1.15</value>
       </product>
    </function>

    <function name="aero/moment/Yaw_rudder">
       <description>Yaw moment due to rudder</description>
       <product>
           <property>aero/qbar-psf</property>
           <property>metrics/Sw-sqft</property>
           <property>metrics/bw-ft</property>
           <property>fcs/rudder-pos-rad</property>
           <value>-0.1</value>
       </product>
    </function>

    <function name="aero/moment/Yaw_aileron">
       <description>Adverse yaw</description>
       <product>
           <property>aero/qbar-psf</property>
           <property>metrics/Sw-sqft</property>
           <property>metrics/bw-ft</property>
           <property>fcs/left-aileron-pos-rad</property>
           <value>0</value>
       </product>
    </function>
  </axis>
 </aerodynamics>
</fdm_config>
